<neuroml xmlns="http://www.neuroml.org/schema/neuroml2"  xmlns:xs="http://www.w3.org/2001/XMLSchema" xmlns:xsi="http://www.w3.org/2001/XMLSchema-instance" xsi:schemaLocation="http://www.neuroml.org/schema/neuroml2 https://raw.github.com/NeuroML/NeuroML2/development/Schemas/NeuroML2/NeuroML_v2.3.xsd" id="BC6_StimNet">
    <include href="BC6_na_k.cell.nml"/>
    <pulseGenerator id="stim0" delay="50ms" duration="200ms" amplitude="0.5nA"/>
    <network id="BC6_StimNet">
        <population id="BC" component="BC6_na_k" type="populationList">
            <instance id="0">
                <location x="0.0" y="0.0" z="0.0"/>
            </instance>
        </population>
        <inputList id="stim0_input" population="BC" component="stim0">
            <input id="0" target="../BC/0/BC6_na_k" destination="synapses"/>
        </inputList>
    </network>
</neuroml>
